*Heading
** Job name: Job-1 Model name: Model-1
** Generated by: Abaqus/CAE 2023
*Preprint, echo=NO, model=NO, history=NO, contact=NO
**
** PARTS
**
*Part, name=Part-5
*End Part
**
**
** ASSEMBLY
**
*Assembly, name=Assembly
**
*Instance, name=Part-5-1, part=Part-5
*Node
      1, 0.00541117042, -0.405239314
      2,  0.626611948, -0.379260987
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*Element, type=CPS4R
   1,    1,   71, 1548,   86
   2,   71,   72, 1549, 1548
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*Nset, nset=Set-1, generate
    1,  8641,     1
*Elset, elset=Set-1, generate
    1,  8035,     1
** Section: Section-2
*Solid Section, elset=Set-1, material=Marging300Steel
0.375,
*End Instance
**
*Node
      1,           0., 6.73555769e-17,           0.
*Nset, nset="Edge Seeds-1", instance=Part-5-1
   10,   21,   22,   23,   25,   34
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*Elset, elset="Edge Seeds-1", instance=Part-5-1
  265,  645,  659,  660,  674,  675
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*Nset, nset="Edge Seeds-2", instance=Part-5-1
   10,   21,   22,   23,   25,   34
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*Elset, elset="Edge Seeds-2", instance=Part-5-1
  265,  645,  659,  660,  674,  675
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*Nset, nset=Set-15, instance=Part-5-1
   51,   53,   54,   55,   57,   59
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*Elset, elset=Set-15, instance=Part-5-1
 7670, 7671, 7672, 7673, 7704, 7705
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*Nset, nset=Set-16, instance=Part-5-1
   4,   5,   7,  28,  29,  30
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*Elset, elset=Set-16, instance=Part-5-1
   49,   54,   59,   64,   69,   74
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*Nset, nset=Set-17, instance=Part-5-1, generate
    1,  8641,     1
*Elset, elset=Set-17, instance=Part-5-1, generate
    1,  8035,     1
*Nset, nset=Set-18, instance=Part-5-1, generate
    1,  8641,     1
*Elset, elset=Set-18, instance=Part-5-1, generate
    1,  8035,     1
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*Nset, nset=Set-32
 1,
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*Nset, nset=_PickedSet78, internal, instance=Part-5-1
   51,   53,   54,   55,   57,   59
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*Elset, elset=_PickedSet78, internal, instance=Part-5-1
 7670, 7671, 7672, 7673, 7704, 7705
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*Elset, elset=_s_Surf-1_S1, internal, instance=Part-5-1
 7670, 7671, 7672, 7673, 7742, 7753, 7754, 7755, 7811
*Elset, elset=_s_Surf-1_S2, internal, instance=Part-5-1
 7704, 7705, 7706, 7738, 7739, 7740
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*Elset, elset=_s_Surf-1_S4, internal, instance=Part-5-1
 7707, 7712, 7717, 7783, 7787, 7791
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*Surface, type=ELEMENT, name=s_Surf-1
_s_Surf-1_S1, S1
_s_Surf-1_S2, S2
_s_Surf-1_S4, S4
*Elset, elset=__PickedSurf74_S1, internal, instance=Part-5-1
 7670, 7671, 7672, 7673, 7742, 7753, 7754, 7755, 7811
*Elset, elset=__PickedSurf74_S2, internal, instance=Part-5-1
 7704, 7705, 7706, 7738, 7739, 7740
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*Elset, elset=__PickedSurf74_S4, internal, instance=Part-5-1
 7707, 7712, 7717, 7783, 7787, 7791
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*Surface, type=ELEMENT, name=_PickedSurf74, internal
__PickedSurf74_S1, S1
__PickedSurf74_S2, S2
__PickedSurf74_S4, S4
*Nset, nset="_T-Datum csys-1", internal
Set-16,
*Transform, nset="_T-Datum csys-1"
          1.,           0.,           0.,           0.,           1.,           0.
*Nset, nset=_T-Cylindrical, internal
_PickedSet78,
*Transform, nset=_T-Cylindrical, type=C
          0.,           0.,           0.,           0.,           0.,           1.
*End Assembly
**
** MATERIALS
**
*Material, name=Marging300Steel
*Elastic
 2.75e+07, 0.33
**
** BOUNDARY CONDITIONS
**
** Name: BC-1 Type: Displacement/Rotation
*Boundary
Set-16, 1, 1
Set-16, 2, 2
Set-16, 6, 6
** Name: BC-2 Type: Displacement/Rotation
*Boundary
_PickedSet78, 1, 1
** ----------------------------------------------------------------
**
** STEP: Step-1
**
*Step, name=Step-1, nlgeom=NO
Positive Torque
*Static
0.1, 1., 1e-05, 1.
**
** BOUNDARY CONDITIONS
**
** Name: BC-1 Type: Displacement/Rotation
*Boundary, op=NEW
Set-16, 1, 1
Set-16, 2, 2
Set-16, 6, 6
** Name: BC-2 Type: Displacement/Rotation
*Boundary, op=NEW
_PickedSet78, 1, 1
**
** LOADS
**
** Name: Load-1   Type: Moment
*Cload
Set-32, 6, 4554.6
**
** OUTPUT REQUESTS
**
*Restart, write, frequency=0
**
** FIELD OUTPUT: F-Output-1
**
*Output, field
*Node Output
U, UR, UT
*Element Output, directions=YES
LE, MISES, MISESMAX, PE, PEEQ, PEMAG, S, YIELDPOT
**
** HISTORY OUTPUT: H-Output-1
**
*Output, history, variable=PRESELECT
*End Step
